# OpenSim document version 40000
ForwardTool subject01_walk1:
  model_file: C:\Users\bme-ladm-jnichols\Dropbox (UFL)\Teaching\BME_6938\Assignments\HW3_OpenSim_Files\.osubject01_simbody_adjusted.osim
  replace_force_set: false
  force_set_files: gait2354_CMC_Actuators.xml
  results_directory: C:\Users\bme-ladm-jnichols\Dropbox (UFL)\Teaching\BME_6938\Assignments\HW3_OpenSim_Files\BME6938_ResultsForward
  output_precision: 20
  initial_time: 0.83
  final_time: 1.08
  solve_for_equilibrium_for_auxiliary_states: false
  maximum_number_of_integrator_steps: 30000
  maximum_integrator_step_size: 1
  minimum_integrator_step_size: 1e-5
  integrator_error_tolerance: 5e-5
  external_loads_file: subject01_walk1_grf.xml
  states_file: ResultsCMC/subject01_walk1_states.sto
  use_specified_dt: false
  AnalysisSet Analyses:
    Kinematics: coordinates=all start_time=0.83 end_time=1.08 step_interval=10 in_degrees=true
    Actuation: start_time=0.83 end_time=1.08 step_interval=10 in_degrees=true
    BodyKinematics: start_time=0.83 end_time=1.08 step_interval=10 in_degrees=true bodies=all
        express_results_in_body_local_frame=false
    MuscleAnalysis: on=false start_time=0.83 end_time=1.08 step_interval=1 in_degrees=true
        muscle_list=(med_gas_r lat_gas_r soleus_r)
        moment_arm_coordinate_list=(hip_flexion_r knee_angle_r ankle_angle_r) compute_moments=false
  ControllerSet Controllers:
    ControlSetController: controls_file=ResultsCMC/subject01_walk1_controls.xml
    CorrectionController: enabled=false kp=16 kv=8
